Формулы
Дано
N := 27
Q_1 := (1 + 0.1*N)*10^-4 = 0.00037
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Q_2 := (120 - N)*10^-5 = 0.00093
l1 := 0.2 + 0.01*N = 0.47  # м
l2 := 2 + 0.1*N = 4.7  # м
l3 := 2.5 + 0.1*N = 5.2  # м
l4 := 3 + 0.1*N = 5.7  # м
l5 := 3.5 + 0.1*N = 6.2  # м
l6 := 4 + 0.1*N = 6.7  # м
l7 := 5 + 0.1*N = 7.7  # м
K_м := 1 + 0.01*N = 1.27
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Рц := 1.3*10^7 - 10^5*N = 10300000
Ргм := 3*10^6 + 1.2*N*10^5 = 6240000
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δ(p, D, σ) := p*D/σ
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Q_1 + Q_2 = 0.0013
D(Q, Vmax) := 2*sqrt(Q/(π*Vmax))
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Q_1 = 0.00037
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Q_2 = 0.00093
K_м*Q_1 + Q =  # error: Эта переменная не определена.
# Внутренние диаметры | Толщина
D_1 := 2*sqrt((Q_1 + Q_2)/(π*1.2)) = 0.0371395  # м
δ_1 := 2*5*10^4*D_1/(2*50*10^6) = 3.71395e-5  # м
D_2 := 2*sqrt((Q_1 + Q_2)/(π*6.5)) = 0.0159577  # м
δ_2 := 2*Рц*D_2/(2*25*10^6) = 0.00657457  # м
D_3 := 2*sqrt(Q_1/(π*6)) = 0.00886095  # м
δ_3 := 2*Рц*D_3/(2*50*10^6) = 0.00182536  # м
D_4.1 := 2*sqrt(K_м*Q_1/(π*6)) = 0.00998578  # м
D_4.2 := 2*sqrt(K_м*Q_1/(π*2)) = 0.0172959  # м
δ_4.1 := 2*Рц*D_4.1/(2*50*10^6) = 0.00205707  # м
D_5 := 2*sqrt(Q_2/(π*6.1)) = 0.0139326  # м
δ_4.2 := 2*(5*10^5)*D_4.2/(2*50*10^6) = 0.000172959  # м
D_6.1 := 2*sqrt(Q_2/(π*6.1)) = 0.0139326  # м
δ_5 := 2*Рц*D_5/(2*50*10^6) = 0.00287011  # м
δ_6.1 := 2*Рц*D_6.1/(2*50*10^6) = 0.00287011  # м
D_6.2 := 2*sqrt(Q_2/(π*2)) = 0.0243322  # м
D_7 := 2*sqrt((K_м*Q_1 + Q_2)/(π*2)) = 0.029853  # м
δ_6.2 := 2*(5*10^5)*D_6.2/(2*50*10^6) = 0.000243322  # м
δ_7 := 2*(5*10^5)*D_7/(2*50*10^6) = 0.00029853  # м
# Выбор труб | Фактические диаметры
# Труба_1  = (38*0.4*470*ГОСТ8734 - 75)/(В10ГОСТ8733 - 87)
d_1 := 37.2*10^-3  # м
# Труба_2  = (30*7*4700*ГОСТ8734 - 75)/(В10ГОСТ8733 - 87)
d_2 := 16*10^-3  # м
d_3 := 9*10^-3  # м
# Труба_3  = (13*2*5200*ГОСТ8734 - 75)/(В10ГОСТ8733 - 87)
d_4.1 := 10*10^-3  # м
d_4.2 := 17.4*10^-3  # м
# Труба_4.1= (15*2.5*5200*ГОСТ8734 - 75)/(В10ГОСТ8733 - 87)
d_5 := 14*10^-3  # м
d_6.1 := 14*10^-3  # м
# Труба_4.2= (18*0.3*500*ГОСТ8734 - 75)/(В10ГОСТ8733 - 87)
d_6.2 := 24.4*10^-3  # м
d_7 := 30*10^-3  # м
# Труба_5  = (20*3*6200*ГОСТ8734 - 75)/(В10ГОСТ8733 - 87)
# Труба_6.1  = (20*3*6200*ГОСТ8734 - 75)/(В10ГОСТ8733 - 87)
# Труба_6.2  = (28*1.8*500*ГОСТ8734 - 75)/(В10ГОСТ8733 - 87)
# Труба_7  = (32*1*7700*ГОСТ8734 - 75)/(В10ГОСТ8733 - 87)
# Фактические скорости
V_1 := 4*(Q_1 + Q_2)/(π*d_1^2) = 1.1961  # м/с
V_2 := 4*(Q_1 + Q_2)/(π*d_2^2) = 6.46567  # м/с
V_3 := 4*Q_1/(π*d_3^2) = 5.81603  # м/с
V_4.1 := 4*(K_м*Q_1)/(π*d_4.1^2) = 5.98295  # м/с
V_4.2 := 4*(K_м*Q_1)/(π*d_4.2^2) = 1.97614  # м/с
V_5 := 4*Q_2/(π*d_5^2) = 6.04139  # м/с
V_6.1 := 4*Q_2/(π*d_6.1^2) = 6.04139  # м/с
V_6.2 := 4*Q_2/(π*d_6.2^2) = 1.9889  # м/с
V_7 := 4*(K_м*Q_1 + Q_2)/(π*d_7^2) = 1.98045  # м/с
Таблица
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